ORIGIN := 1
# Assignment 2 Problem 2
T[1] := (T[2] + T[5] + T_out + 20)/4  # error: bad_variable mc_T_2E_out mc_T_2E_out value_zone
T[9] := (T[5] + T[10] + T[13] + 20)/4
T[2] := (T[1] + T[3] + T[6] + T_out)/4  # error: bad_variable mc_T_2E_out mc_T_2E_out value_zone
T[10] := (T[6] + T[9] + T[11] + T[14])/4
T[3] := (T[2] + T[4] + T[7] + T_out)/4  # error: bad_variable mc_T_2E_out mc_T_2E_out value_zone
T[11] := (T[7] + T[10] + T[12] + T[15])/4
T[4] := (T[3] + T[8] + T_out + 20)/4  # error: bad_variable mc_T_2E_out mc_T_2E_out value_zone
T[12] := (T[8] + T[11] + T[16] + 20)/4
T[5] := (T[1] + T[6] + T[9] + 20)/4
T[13] := (T[9] + T[14] + 20 + 20)/4
T[6] := (T[2] + T[5] + T[7] + T[10])/4
T[14] := (T[13] + T[10] + T[15] + 20)/4
T[7] := (T[3] + T[6] + T[8] + T[11])/4
T[15] := (T[14] + T[16] + T[11] + 20)/4
T[8] := (T[4] + T[7] + T[12] + 20)/4
T[16] := (T[12] + T[15] + 20 + 20)/4
A := [
    1, -1/4, 0, 0, -1/4, 0, 0, 0, 0, 0, 0, 0, 0, 0, 0, 0;
    -1/4, 1, -1/4, 0, 0, -1/4, 0, 0, 0, 0, 0, 0, 0, 0, 0, 0;
    0, -1/4, 1, -1/4, 0, 0, -1/4, 0, 0, 0, 0, 0, 0, 0, 0, 0;
    0, 0, -1/4, 1, 0, 0, 0, -1/4, 0, 0, 0, 0, 0, 0, 0, 0;
    -1/4, 0, 0, 0, 1, -1/4, 0, 0, -1/4, 0, 0, 0, 0, 0, 0, 0;
    0, -1/4, 0, 0, -1/4, 1, -1/4, 0, 0, -1/4, 0, 0, 0, 0, 0, 0;
    0, 0, -1/4, 0, 0, -1/4, 1, -1/4, 0, 0, -1/4, 0, 0, 0, 0, 0;
    0, 0, 0, -1/4, 0, 0, -1/4, 1, 0, 0, 0, -1/4, 0, 0, 0, 0;
    0, 0, 0, 0, -1/4, 0, 0, 0, 1, -1/4, 0, 0, -1/4, 0, 0, 0;
    0, 0, 0, 0, 0, -1/4, 0, 0, -1/4, 1, -1/4, 0, 0, -1/4, 0, 0;
    0, 0, 0, 0, 0, 0, -1/4, 0, 0, 0, 1, -1/4, 0, 0, -1/4, 0;
    0, 0, 0, 0, 0, 0, 0, -1/4, 0, 0, -1/4, 1, 0, 0, 0, -1/4;
    0, 0, 0, 0, 0, 0, 0, 0, -1/4, 0, 0, 0, 1, -1/4, 0, 0;
    0, 0, 0, 0, 0, 0, 0, 0, 0, -1/4, 0, 0, -1/4, 1, -1/4, 0;
    0, 0, 0, 0, 0, 0, 0, 0, 0, 0, -1/4, 0, 0, -1/4, 1, -1/4;
    0, 0, 0, 0, 0, 0, 0, 0, 0, 0, 0, -1/4, 0, 0, -1/4, 1
]
T_out := -14.9
b := [
    (T_out + 20)/4;
    T_out/4;
    T_out/4;
    (T_out + 20)/4;
    20/4;
    0;
    0;
    20/4;
    20/4;
    0;
    0;
    20/4;
    (20 + 20)/4;
    20/4;
    20/4;
    (20 + 20)/4
]
M := lsolve(A, b)
M = [3.84722; -1.33322; -1.50342; 3.69349; 11.6221; 7.22332; 6.52607; 11.1774; 15.4178; 12.0783; 9.20699; 14.49; 17.9708; 16.4653; 15.8119; 17.5755]
M → [3.84721547988; -1.33322055538; -1.50341535635; 3.69349114353; 11.6220824749; 7.22331765493; 6.52606798645; 11.1773799305; 15.4177967649; 12.0783407137; 9.20698971678; 14.4899605919; 17.9707638708; 16.4652587183; 15.8119302888; 17.5754727202]
mean(M) = 10.0168
