3.
ORIGIN := 1
A := READ_IMAGE("dump_truck.jpg")
m := rows(A)
n := cols(A)
m = 281
n = 443
i := 1 .. m
j := 1 .. n
X[i, j] := j
Y[i, j] := (m + 1) - i
# [component: inputs (X, Y, A)]
[X[i, j]; Y[i, j]] := [-1, 0; 0, 1]*[X[i, j]; Y[i, j]]  # <--- (1)
# [component: inputs (X, Y, A)]
# _________________________________________________________________________________
[X[i, j]; Y[i, j]] := [2, 0; 0, 1]*[X[i, j]; Y[i, j]]  # <--- (2)
# [component: inputs (X, Y, A)]
[X[i, j]; Y[i, j]] := [cos(3*π/4), sin(3*π/4); -sin(3*π/4), cos(3*π/4)]*[X[i, j]; Y[i, j]]  # <--- (3)
# [component: inputs (X, Y, A)]
