# 1.
A := [1, 3, 4, -2; 7, 9, -4, 1/2; 1/3, 6, 7, 6; -1/2, 12, 5, 5]
b := [1; 2; 3; 4]
ORIGIN := 1
# Change the origin so that
# we start counting at 1
# We add vector b to the end of matrix A,
# put in reduced row eschelon form, and
# extract the solution.
# a)
M := augment(A, b)
rref(M)[:, 5] = [0.0464023; 0.234068; 0.122859; 0.12002]
x := A^-1*b
x = [0.0464023; 0.234068; 0.122859; 0.12002]  # We multiply A inverse by b to get the solution.
# Replace the 2nd row of
# A with the vector b
# b)
A2 := augment(A[:, 1], b, A[:, 3], A[:, 4])
A2 = [1, 1, 4, -2; 7, 2, -4, 0.5; 0.333333, 3, 7, 6; -0.5, 4, 5, 5]
x[2] := |A2|/|A|
x[2] = 0.234068  # Use Cramer's rule to find x_2
# 2.
# a)
# Take the system of equations formed from  flow in = flow out, and put into reduced row eschelon form
F := [-1, 0, 0, -1, 0, -55; 1, -1, -1, 0, 0, 20; 0, 0, 1, 0, 1, 15; 0, 1, 0, 1, -1, 20]
rref(F) = [1, 0, 0, 1, 0, 55; 0, 1, 0, 1, -1, 20; 0, 0, 1, 0, 1, 15; 0, 0, 0, 0, 0, 0]
# From this we get the equations
# f_1 = 55 - f_4
# f_2 = 20 - f_4 + f_5
# f_3 = 15 - f_5
# where f_4 and f_5 are parameters
# b)
# We take the same matrix and set f_3 to 0, and put into reduced row eschelon form again.
F := [-1, 0, 0, -1, 0, -55; 1, -1, 0, 0, 0, 20; 0, 0, 0, 0, 1, 15; 0, 1, 0, 1, -1, 20]
rref(F) = [1, 0, 0, 1, 0, 55; 0, 1, 0, 1, 0, 35; 0, 0, 0, 0, 1, 15; 0, 0, 0, 0, 0, 0]
# From the new matrix we have the equations
# f_1 = 55 - f_4
# f_2 = 35 - f_4
# f_5 = 15
# and f_4 is a parameter
# Since f1 = 55 - f4, and f4 ≤ 30 therefore our solution is:
# 25 ≤ f4 ≤ 30
# 3.
# 1 = 5a - b + 2c
# 2 = 6a - c
# 3 = 7a + b - c
# 4 = 8a + 2b
# Put this system of
# equations into a matrix
# and put into reduced
# row eschelon form.
A := [5, -1, 2, 1; 6, 0, -1, 2; 7, 1, -1, 3; 8, 2, 0, 4]
rref(A) = [1, 0, 0, 0.333333; 0, 1, 0, 0.666667; 0, 0, 1, 0; 0, 0, 0, 0]
# Thus we see that [1; 2; 3; 4] == 1/3*[5; 6; 7; 8] + 2/3*[-1; 0; 1; 2] and thus it is in the span
# 4.
# a)
# We plug the given points into the equation of a line and put the result into a matrix.  The determinant should be zero since there is a non-trivial solution, but we will omit the row of zeros since they are unneccesary.
A := [1, 2, 1, 0; 3, 4, 1, 0]
rref(A) = [1, 0, -1, 0; 0, 1, 1, 0]
# Therefore we get that a = c and b = -c.  c is a parameter so we let c = 1,
# and we get that the equation of the line is x - y + 1 = 0.  We get infinite equations for our line since c is a parameter, but they are all just multiples of eachother.
# b)
# We take our points and once again plug into the equation of a circle, and then form a matrix.
A := [37, -1, 6, 1, 0; 17, 4, 1, 1, 0; 29, 2, 5, 1, 0]
rref(A) = [1, 0, 0, 0.0434783, 0; 0, 1, 0, 0.0869565, 0; 0, 0, 1, -0.0869565, 0]
# And we let e = -23 to get the equation:
# (x^2 + y^2) + 2*x - 2*y - 23 == 0
# And we get the equivalent equation
# (x + 1)^2 + (y - 1)^2 == 25
# Thus the centre of the circle is at (1,1)
# and it has radius 5
# c)
# We plug our given points into the equation for a plane, and form a matrix.
A := [4, 2, 0, 1, 0; -4, 3, 4, 1, 0; 1, 3, -2, 1, 0]
rref(A) = [1, 0, 0, 0.075, 0; 0, 1, 0, 0.35, 0; 0, 0, 1, 0.0625, 0]
# Letting d = -40 we get the equation:
# 3*x + 14*y + 5/2*z - 40 == 0
