Tout := -20
ORIGIN := 1
Coeff := [5 + Tout/4; Tout/4; Tout/4; 5 + Tout/4; 5; 0; 0; 5; 5; 0; 0; 5; 10; 5; 5; 10]
Averages := [
    1, -1/4, 0, 0, -1/4, 0, 0, 0, 0, 0, 0, 0, 0, 0, 0, 0;
    -1/4, 1, -1/4, 0, 0, -1/4, 0, 0, 0, 0, 0, 0, 0, 0, 0, 0;
    0, -1/4, 1, -1/4, 0, 0, -1/4, 0, 0, 0, 0, 0, 0, 0, 0, 0;
    0, 0, -1/4, 1, 0, 0, 0, -1/4, 0, 0, 0, 0, 0, 0, 0, 0;
    -1/4, 0, 0, 0, 1, -1/4, 0, 0, -1/4, 0, 0, 0, 0, 0, 0, 0;
    0, -1/4, 0, 0, -1/4, 1, -1/4, 0, 0, -1/4, 0, 0, 0, 0, 0, 0;
    0, 0, -1/4, 0, 0, -1/4, 1, -1/4, 0, 0, -1/4, 0, 0, 0, 0, 0;
    0, 0, 0, -1/4, 0, 0, -1/4, 1, 0, 0, 0, -1/4, 0, 0, 0, 0;
    0, 0, 0, 0, -1/4, 0, 0, 0, 1, -1/4, 0, 0, -1/4, 0, 0, 0;
    0, 0, 0, 0, 0, -1/4, 0, 0, -1/4, 1, -1/4, 0, 0, -1/4, 0, 0;
    0, 0, 0, 0, 0, 0, -1/4, 0, 0, -1/4, 1, -1/4, 0, 0, -1/4, 0;
    0, 0, 0, 0, 0, 0, 0, -1/4, 0, 0, -1/4, 1, 0, 0, 0, -1/4;
    0, 0, 0, 0, 0, 0, 0, 0, -1/4, 0, 0, 0, 1, -1/4, 0, 0;
    0, 0, 0, 0, 0, 0, 0, 0, 0, -1/4, 0, 0, -1/4, 1, -1/4, 0;
    0, 0, 0, 0, 0, 0, 0, 0, 0, 0, -1/4, 0, 0, -1/4, 1, -1/4;
    0, 0, 0, 0, 0, 0, 0, 0, 0, 0, 0, -1/4, 0, 0, -1/4, 1
]
T := Averages^-1*Coeff
T = [1.81818; -3.78788; -3.78788; 1.81818; 11.0606; 6.81818; 6.81818; 11.0606; 15.6061; 13.1818; 13.1818; 15.6061; 18.1818; 17.1212; 17.1212; 18.1818]
AverageTemp := sum(T[i], i = 1 .. 16)/16
AverageTemp = 10
A := [
    20, Tout, Tout, Tout, Tout, 20;
    20, T[1], T[2], T[3], T[4], 20;
    20, T[5], T[6], T[7], T[8], 20;
    20, T[9], T[10], T[11], T[12], 20;
    20, T[13], T[14], T[15], T[16], 20;
    20, 20, 20, 20, 20, 20
]
# [component: inputs A]
