# 1.
A := [1, 3, 4, -2; 7, 9, -4, 1/2; 1/3, 6, 7, 6; -1/2, 12, 5, 5]
b := [1; 2; 3; 4]
# To solve for this we incorperate matrix A
# with matrix b, so we can solve using rref
# a) | Then we have an augmented matrix of [A,b]
Α := augment(A, b)
# Then,
R := rref(Α)
R = [1, 0, 0, 0, 0.0464023; 0, 1, 0, 0, 0.234068; 0, 0, 1, 0, 0.122859; 0, 0, 0, 1, 0.12002]
Α → [1, 3, 4, -2, 1; 7, 9, -4, 1/2, 2; 1/3, 6, 7, 6, 3; -1/2, 12, 5, 5, 4]
# We extract the last column in Matrix R, this gives us x
X := R[:, 4]
X = [0.0464023; 0.234068; 0.122859; 0.12002]
# We find the inverse of matrix A
A^-1 → -4/10215*[
    -150, -291, -819/2, 921/2;
    -225/4, -24, 459/2, -591/2;
    -665/2, 70, -975/4, 305/2;
    905/2, -83/2, -348, 92
]
So
x := A^-1*b
x = [0.0464023; 0.234068; 0.122859; 0.12002]
# Therefore each method of solving is equal to one another
# b)
A := [1, 3, 4, -2; 7, 9, -4, 1/2; 1/3, 6, 7, 6; -1/2, 12, 5, 5]  # Then, we see
A2 := [1, 1, 4, -2; 7, 2, -4, 1/2; 1/3, 3, 7, 6; -1/2, 4, 5, 5]
# Then we found the determinates of the two matrices shown above
d2 := |A2|
d := |A|
d2 = -597.75
d = -2553.75
d → -10215/4
d2 → -2391/4
# Using Cramer's Rule we find that,
x2 := d2/d
x2 = 0.234068
# We can confirm these results with MathCAD's lsolve function
C := lsolve(A, b)
C = [0.0464023; 0.234068; 0.122859; 0.12002]
# 2. | Given matrix (Changes)
Changes := [1, 0, 0, 1, 0, 55; 1, -1, -1, 0, 0, 20; 0, 0, 1, 0, 1, 15; 0, 1, 0, 1, -1, 20]
rref(Changes) = [1, 0, 0, 1, 0, 55; 0, 1, 0, 1, -1, 20; 0, 0, 1, 0, 1, 15; 0, 0, 0, 0, 0, 0]
# So we solved for Matrix (Changes), with f4 and f5 are parameters
# We have constraints for this system
# where:
# f1= 55 - f4
# f2= 20 - f4 + f5
# f3= 15 - f5
f1 ≥ 0
f4 ≤ 55
f2 ≥ 0
f5 ≤ 15
f3 ≥ 0
# b)
25 ≤ f1 ≤ 30
25 ≤ f4 ≤ 30
f1 + f4 == 55
# 3. | Given two matrices
PT := [1; 2; 3; 4]
Span := [5, -1, 2; 6, 0, -1; 7, 1, -1; 8, 2, 0]
# We create an augmented matrix [Span, PT]
AUG := augment(Span, PT)
AUG → [5, -1, 2, 1; 6, 0, -1, 2; 7, 1, -1, 3; 8, 2, 0, 4]
# We reduce this matrix to RREF
RE := rref(AUG)
RE = [1, 0, 0, 0.333333; 0, 1, 0, 0.666667; 0, 0, 1, 0; 0, 0, 0, 0]
# Since there is not solution to row 3, then the matrix PT
# is not part of the Span.
# 4.
