ORIGIN := 1
T := -15.8
# Set up matrix and solve the system AX = B
B := [20 + T; T; T; 20 + T; 20; 0; 0; 20; 20; 0; 0; 20; 40; 20; 20; 40]
A := [
    4, -1, 0, 0, -1, 0, 0, 0, 0, 0, 0, 0, 0, 0, 0, 0;
    -1, 4, -1, 0, 0, -1, 0, 0, 0, 0, 0, 0, 0, 0, 0, 0;
    0, -1, 4, -1, 0, 0, -1, 0, 0, 0, 0, 0, 0, 0, 0, 0;
    0, 0, -1, 4, 0, 0, 0, -1, 0, 0, 0, 0, 0, 0, 0, 0;
    -1, 0, 0, 0, 4, -1, 0, 0, -1, 0, 0, 0, 0, 0, 0, 0;
    0, -1, 0, 0, -1, 4, -1, 0, 0, -1, 0, 0, 0, 0, 0, 0;
    0, 0, -1, 0, 0, -1, 4, -1, 0, 0, -1, 0, 0, 0, 0, 0;
    0, 0, 0, -1, 0, 0, -1, 4, 0, 0, 0, 0, 0, 0, 0, 0;
    0, 0, 0, 0, -1, 0, 0, 0, 4, -1, 0, 0, -1, 0, 0, 0;
    0, 0, 0, 0, 0, -1, 0, 0, -1, 4, -1, 0, 0, -1, 0, 0;
    0, 0, 0, 0, 0, 0, -1, 0, 0, -1, 4, -1, 0, 0, -1, 0;
    0, 0, 0, 0, 0, 0, 0, -1, 0, 0, -1, 4, 0, 0, 0, -1;
    0, 0, 0, 0, 0, 0, 0, 0, -1, 0, 0, 0, 4, -1, 0, 0;
    0, 0, 0, 0, 0, 0, 0, 0, 0, -1, 0, 0, -1, 4, -1, 0;
    0, 0, 0, 0, 0, 0, 0, 0, 0, 0, -1, 0, 0, -1, 4, -1;
    0, 0, 0, 0, 0, 0, 0, 0, 0, 0, 0, -1, 0, 0, -1, 4
]
C := lsolve(A, B)
# So C are the temperatures of the individual nodes. Thus, take the summation of the rightmost column and divide by 16 in order to get average temp. After that, just fiddle with the T variable we defined above to get the average to be 10.
mean(C) = 9.99968
# Thus, as seen above, the outside temperature is about -15.8 degrees.
C = [3.50684; -1.81831; -2.28973; 2.25628; 11.6457; 7.30964; 6.20312; 7.11485; 15.7662; 13.2081; 12.6777; 14.4044; 18.2112; 17.0787; 16.8953; 17.8249]
m := rows(A)
n := cols(A)
i := 1 .. m
